VAX := READPRN("C:\MC11demo\circuit1.DNO")
Id3 := max(VAX[:, 1])
Id3 = 0.0212689
nMax := match(Id3, VAX[:, 1])
nMax = [50]
Ud3 := VAX[:, 0][50]
Ud3 = 0.787327
nId1 := match(Id3/4, VAX[:, 1])
nId1 = [39]
VAX = [
    0, 0;
    0.0199996, 1e-7;
    0.0399992, 2e-7;
    0.0599988, 2e-7;
    0.0799984, 3e-7;
    0.099998, 4e-7;
    0.119998, 5e-7;
    0.139997, 6e-7;
    0.159997, 6e-7;
    0.179996, 7e-7
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]
VAX[:, 0] = [
    0; 0.0199996; 0.0399992; 0.0599988; 0.0799984; 0.099998; 0.119998; 0.139997; 0.159997; 0.179996
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]
VAX[:, 1] = [
    0; 1e-7; 2e-7; 2e-7; 3e-7; 4e-7; 5e-7; 6e-7; 6e-7; 7e-7
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]
nId2 := match(Id3/2, VAX[:, 1])
nId2 = [43]
Ud1 := linterp(VAX[:, 0], VAX[:, 1], Id3/4)
Ud1 = 2.65867e-8
Id1 := Id3/4
Ud2 := linterp(VAX[:, 0], VAX[:, 1], Id3/2)
Ud2 = 5.31733e-8
Id2 := Id3/2
Rb := (Ud1 - 2*Ud2 + Ud3)/Id1
Rb = 148.071
VAX[:, 0][3, :] = [0.0599988]
0.823 = (10^-3*Rb + ln((IS + 10^-3)/IS)*m*Ft)  # error: Эта переменная не определена. Проверьте правильность установки обозначения.
# [plot: VAX[:, 1] vs VAX[:, 0]]
NFt := ((3*Ud2 - 2*Ud1) - Ud3)/ln(2)
NFt = -1.13587
Is0 := Id1*exp(-1/NFt*(2*Ud1 - Ud3))
Is0 = 0.00265861
x := 10^-0
Rb := 1
IS := 1*10^-10
m := 2
Ft := 0.026
F(x) := x*Rb + ln((IS + x)/IS)*m*Ft
F(x) = 2.19734
solve block
    # solver
    Diod_P := Minerr(IS, Rb, m, Ft)
    0*.823 = (10^-3*Rb + ln((IS + 10^-3)/IS)*m*Ft)  # error: Эта переменная не определена. Проверьте правильность установки обозначения.
    0.949 = (10^-2*Rb + ln((IS + 10^-2)/IS)*m*Ft)  # error: Эта переменная не определена. Проверьте правильность установки обозначения.
    1.157 = (10^-1*Rb + ln((IS + 10^-1)/IS)*m*Ft)  # error: Эта переменная не определена. Проверьте правильность установки обозначения.
    2.174 = (10^-0*Rb + ln((IS + 10^-0)/IS)*m*Ft)  # error: Эта переменная не определена. Проверьте правильность установки обозначения.
end solve block
Diod_P[0, :] = [1e-10]
Diod_P[2, :] = [2]
Diod_P = [1e-10; 1; 2; 0.026]
Diod_P[1, :] = [1]
Diod_P[3, :] = [0.026]
Id := 10^-3
F(Id) := (Id*Diod_P[1] + ln((Diod_P[0] + Id)/Diod_P[0])*Diod_P[2]*Diod_P[3])
F(Id) = 0.839141
