i := 0 .. 5
Fmax[i] := [398.25*10^3; 501.175*10^3; 501.150*10^3; 501.200*10^3; 5.011*10^3]
Vvar[i] := [0; -5; -10; -15; -20]
# [plot: Fmax[i] vs Vvar[i]]
Fr == 1/(2*pi*sqrt((Ck + Cd)*Lk))
Lk := 10^-3
Ck := 10^-10
pi := 3.14
-(Cd*Lk - 1/(4*Fr^2*pi^2))/Lk
Fr[i] := Fmax[i]
Cd := -(Ck*Lk - 1/(4*Fr^2*pi^3))/Lk
# [plot: Cd[i] vs Vvar[i]]
